# OpenSim document version 30000
# Markers and coordinates to be considered (tasks) and their weightings.
IKTaskSet:
  IKMarkerTask Sternum: apply=true weight=5
  IKMarkerTask Neck: apply=true weight=5
  IKMarkerTask RShoulder: apply=true weight=5
  IKMarkerTask LShoulder: apply=true weight=5
  IKMarkerTask Sacral: apply=false weight=10
  IKMarkerTask RAsis: apply=true weight=10
  IKMarkerTask LAsis: apply=true weight=10
  IKMarkerTask RPsis: apply=true weight=10
  IKMarkerTask LPsis: apply=true weight=10
  IKMarkerTask RThighSuperior: apply=true weight=10
  IKMarkerTask RThighInferior: apply=true weight=10
  IKMarkerTask RThighLateral: apply=true weight=10
  IKMarkerTask RShankSuperior: apply=true weight=10
  IKMarkerTask RShankInferior: apply=true weight=10
  IKMarkerTask RShankLateral: apply=true weight=10
  IKMarkerTask RHeel: apply=true weight=5
  IKMarkerTask RMidfootMedial: apply=true weight=5
  IKMarkerTask RMidfootLateral: apply=true weight=5
  IKMarkerTask RToe: apply=true weight=3
  IKMarkerTask LThighSuperior: apply=true weight=10
  IKMarkerTask LThighInferior: apply=true weight=10
  IKMarkerTask LThighLateral: apply=true weight=10
  IKMarkerTask LShankSuperior: apply=true weight=10
  IKMarkerTask LShankInferior: apply=true weight=10
  IKMarkerTask LShankLateral: apply=true weight=10
  IKMarkerTask LHeel: apply=true weight=5
  IKMarkerTask LMidfootMedial: apply=true weight=5
  IKMarkerTask LMidfootLateral: apply=true weight=5
  IKMarkerTask LToe: apply=true weight=3
