# OpenSim document version 20302
ExternalLoads Ex2:
  datafile: D:\Dropbox\MATLAB\femoral_anteversion_paper\6_muscle_length_variations\ScaledMuscleParams_sims\GC5_FemAntev40Deg_scaled\External Loads\PS_ngait_og_ss11_kinetics.mot
  external_loads_model_kinematics_file: D:\Dropbox\MATLAB\femoral_anteversion_paper\6_muscle_length_variations\ScaledMuscleParams_sims\GC5_FemAntev40Deg_scaled\IK\PS_ngait_og_ss11_kinematics.mot
  lowpass_cutoff_frequency_for_load_kinematics: 6
  ExternalForce GRF1: applied_to_body=calcn_l force_expressed_in_body=ground point_expressed_in_body=ground
      force_identifier=1_ground_force_v point_identifier=1_ground_force_p torque_identifier=1_ground_torque
  ExternalForce GRF2: applied_to_body=ground force_expressed_in_body=ground point_expressed_in_body=ground
      force_identifier=2_ground_force_v point_identifier=2_ground_force_p torque_identifier=2_ground_torque
  ExternalForce GRF3: applied_to_body=ground force_expressed_in_body=ground point_expressed_in_body=ground
      force_identifier=3_ground_force_v point_identifier=3_ground_force_p torque_identifier=3_ground_torque
